*Heading
** Job name: umat2 Model name: umat2
** Generated by: Abaqus/CAE 6.14-2
*Preprint, echo=NO, model=NO, history=NO, contact=NO
**
** PARTS
**
*Part, name=brick
*Node
      1,  0.100000001,           0.,           0.
      2,  0.100000001,  0.100000001,           0.
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*Element, type=C3D8
  1, 467,  89,  25,  26, 965, 587, 523, 524
  2, 141,  81,  82, 142, 639, 579, 580, 640
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*Nset, nset=brick_set, generate
   1,  996,    1
*Elset, elset=brick_set, generate
   1,  453,    1
** Section: user_sec
*Solid Section, elset=brick_set, material=user_mat
,
*End Part
**
**
** ASSEMBLY
**
*Assembly, name=Assembly
**
*Instance, name=brick-1, part=brick
*End Instance
**
*Nset, nset=bottom_set, instance=brick-1
   1,   3,  27,  28,  29,  30
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*Elset, elset=bottom_set, instance=brick-1
   5,   6,   7,   8,  24,  26
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*Nset, nset=top_set, instance=brick-1
   2,   7,  70,  71,  72,  73
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*Elset, elset=top_set, instance=brick-1
   2,  22,  51,  52,  58,  65
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*End Assembly
**
** MATERIALS
**
*Material, name=user_mat
*User Material, constants=3
 7e+10, 0.27,  0.1
** ----------------------------------------------------------------
**
** STEP: Step-1
**
*Step, name=Step-1, nlgeom=YES
*Static
0.1, 0.1, 1e-06, 0.1
**
** BOUNDARY CONDITIONS
**
** Name: fix_bc Type: Displacement/Rotation
*Boundary
bottom_set, 1, 1
bottom_set, 2, 2
bottom_set, 3, 3
** Name: velocity_bc Type: Velocity/Angular velocity
*Boundary, type=VELOCITY
top_set, 1, 1
top_set, 2, 2, 0.2
top_set, 3, 3
**
** OUTPUT REQUESTS
**
*Restart, write, frequency=0
**
** FIELD OUTPUT: F-Output-1
**
*Output, field, variable=PRESELECT, number interval=20
**
** HISTORY OUTPUT: H-Output-1
**
*Output, history, variable=PRESELECT
*End Step
